# Упражнение 1
a := 0.8
N := 20
AM := 1
b := 0.5*π*a
b = 1.25664
f(x) := AM*max(sign(cos(x/a)), 0)
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f(x) := x - floor(x)
x := 0, 0.1 .. 5
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g(y) :=
    0.4*y if -2 ≤ y ≤ 2
    0 otherwise
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g(y) :=
    0.8*y + 1 if -2.5 ≤ y ≤ 0
    (1 - 0.8*y) if 0 ≤ y ≤ 2.5
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# Упражнение 2
F(x) := integral(A*exp(-1i*w*x), x = 0 .. τ) → A*(e^(-τ*w*1i) - 1)*1i/w  # error: This variable is undefined.
F(x) := integral(A*exp(-1i*ω*x), x = -τ/2 .. τ/2) → 2*A*sin(τ*ω/2)/ω  # error: This variable is undefined.
ω := -5*π, -4.9*π .. 5*π
τ1 := 2
F(ω) := |1i/ω*exp(-1/2*1i*τ1*ω) - 1i/ω*exp(1/2*1i*τ1*ω)|
fg(ω) := arg(1i/ω*exp(-1/2*1i*τ1*ω) - 1i/ω*exp(1/2*1i*τ1*ω))
# амплитудный спектр
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# фазовый спектр
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ω := -5*π, -4.9*π .. 5*π
τ := 2
F(ω) := |A*(e^(-τ*ω*1i) - 1)*1i/ω|
fg(ω) := arg(A*(e^(-τ*ω*1i) - 1)*1i/ω)
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# Нессиметричный треугольный сигнал
s(t) :=
    A*t/T if 0 < t < T
    0 otherwise
S(ω) := integral(A*t/T*exp(-1i*ω*t), t = 0 .. T) → A*(e^(-T*ω*1i) - 1 + T*ω*e^(-T*ω*1i)*1i)/(T*ω^2)
ω := -5*π, -4.9*π .. 5*π
T := 3
F(ω) := |A*(e^(-T*ω*1i) - 1 + T*ω*e^(T*ω*(-1i))*1i)/(T*ω^2)|
fg(ω) := arg(A*(e^(-T*ω*1i) - 1 + T*ω*e^(T*ω*(-1i))*1i)/(T*ω^2))
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# Симметричный треугольный сигнал
s(t) :=
    A*(1 - |t|/T) if |t| ≤ T
    0 otherwise
S(ω) := integral(A*(1 - |t|/T)*exp(-1i*ω*t), t = 0 .. T) → -A*(e^(-3i*ω) - 1 + 3i*ω)/(3*ω^2)
ω := -5*π, -4.9*π .. 5*π
T := 3
F(ω) := |-A*(e^(-3i*ω) - 1 + 3*ω*1i)/(3*ω^2)|
fg(ω) := arg(-A*(e^(-3i*ω) - 1 + 3*ω*1i)/(3*ω^2))
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# Односторонний экспоненциальный импульс
S(ω) := integral(A*exp(-5*t)*exp(-1i*ω*t), t = 0 .. ∞) → -A*(-5 + ω*1i)/(ω^2 + 25)
ω := -5*π, -4.9*π .. 5*π
T := 3
F(ω) := |-A*(-5 + ω*1i)/(ω^2 + 25)|
fg(ω) := arg(-A*(-5 + ω*1i)/(ω^2 + 25))
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# Двусторонний экспоненциальный импульс
S(ω) := integral(A*exp(-5*|t|)*exp(-1i*ω*t), t = -∞ .. ∞) → 10*A/(ω^2 + 25)
ω := -5*π, -4.9*π .. 5*π
T := 3
F(ω) := |10*A/(ω^2 + 25)|
fg(ω) := arg(10*A/(ω^2 + 25))
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# Гаусов импульс
S(ω) := integral(A*exp(-36*t^2)*exp(-1i*ω*t), t = -∞ .. ∞) → sqrt(π)*A*e^(-ω^2/144)/6
ω := -5*π, -4.9*π .. 5*π
T := 3
fg(ω) := arg(sqrt(π)*A*e^(-ω^2/144)/6)
F(ω) := |sqrt(π)*A*e^(-ω^2/144)/6|
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s(t) := sin(t)/t
s(ω) := integral(s(t)*exp(-1i*ω*t), t = -2*π .. 2*π)
# Упражнение 3
f(t) :=
    A if 1 ≥ t ≥ -1
    0 otherwise
B(τ) := integral(f(t)*f(t - τ), t = -T/2 .. T/2)
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ω0 := 5
φ := π
s(t) := A*cos(ω0*t + φ)
B(τ) := integral(ω0/(2*π)*s(t)*s(t - τ), t = -π/ω0 .. π/ω0)
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# Упражнение 4
g1(t) :=
    A if 0 ≤ t ≤ T
    0 otherwise
s2(t) :=
    A*t/T if 0 ≤ t ≤ T
    0 otherwise
B12(τ) := integral(g1(t)*s2(t - τ), t = -T/2 .. T/2)
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